<?xml version="1.0"?>
<Node name="root" gravity="0 0 0" dt="0.01" >
    <RequiredPlugin name="SofaOpenglVisual"/>

    <RequiredPlugin pluginName="Geomagic"/>

	<VisualStyle displayFlags="showVisualModels showBehaviorModels hideCollisionModels hideBoundingCollisionModels hideMappings hideMechanicalMappings hideForceFields hideInteractionForceFields hideWireframe hideNormals" />

    <GeomagicDriver name="GeomagicDevice" deviceName="Default Device" scale="1" drawDevice="0" drawDeviceFrame="0"
    positionBase="0 0 0" orientationBase="0 0 0 1" manualStart="true" />

	<MechanicalObject template="Rigid3d" name="GeomagicMO" position="@GeomagicDevice.positionDevice" />

    <!-- Example of an instrument controlled with the Geomagic device -->
    <Node name="mapping">
        <MeshObjLoader name="meshLoader_0" filename="./mesh/dental_instrument.obj" handleSeams="1" />
        <OglModel name="Visual" src="@meshLoader_0" color="red"  />
        <RigidMapping input="@.." output="@Visual" />
    </Node>


</Node>
