<?xml version="1.0" ?>
<Node name="lroot" gravity="0 0 -9" dt="0.01">
    <VisualStyle displayFlags="showVisual showBehaviorModels " /> <!--showBehaviorModels showCollisionModels-->
    <RequiredPlugin name="Carving" pluginName="SofaCarving" />
	<DefaultPipeline verbose="0" depth="10" draw="0" />
    <BruteForceDetection name="N2" />
    <MinProximityIntersection name="Proximity" alarmDistance="0.5" contactDistance="0.2" />
    <DefaultContactManager name="Response" response="default" />
    <DefaultCollisionGroupManager name="Group" />
	<CarvingManager active="true" carvingDistance="-0.09"/>

    <FreeMotionAnimationLoop/>
	<GenericConstraintSolver maxIt="1000" tolerance="0.0001" printLog="false" />

	<EulerImplicitSolver name="cg_odesolver" printLog="false"  rayleighStiffness="0.01" rayleighMass="0.1" />
	<CGLinearSolver iterations="12" name="linear solver" tolerance="1.0e-4" threshold="1.0e-4" />


	<!--texturename="./mesh/Materials/Textures/Organs_diffC.jpg" -->
    <Node name="lung_left">
		<MeshObjLoader name="loader" filename="./mesh/organs_lung_left.obj" />
		<SparseGridTopology name="grid" n="4 7 6" position="@loader.position" drawHexahedra="0" />
		<MechanicalObject name="dofs" scale3d="1 1 1" />
		<UniformMass totalMass="1.0" />
		<HexahedronFEMForceField name="FEM" youngModulus="40.0" poissonRatio="0.3" method="large" printLog="0" />
		<MiddleForceField name="center" force="0.02" pace="3.0" />

		<BoxROI name="ROI1" box="4 2 -5 10 15 5" drawBoxes="1" />
		<FixedConstraint indices="@ROI1.indices" />

		<Node name="lung_left_visu">
            <MeshObjLoader name="loader" filename="./mesh/organs_lung_left.obj" handleSeams="1"/>
			<OglModel name="Visual" src="@loader" texturename=""/>
			<BarycentricMapping input="@.." output="@Visual" />
		</Node>

		<Node name="lung_left_collision">
			<MeshObjLoader name="loader" filename="./mesh/organs_lung_left_collision.obj"/>
			<MeshTopology src="@loader" />
            <MechanicalObject src="@loader" name="CollisModel" />
            <SphereCollisionModel radius="0.5"  selfCollision="0" group="1"/>
			<BarycentricMapping input="@.." output="@." />
		</Node>
		<UncoupledConstraintCorrection />
	</Node>

	<Node name="lung_right">
        <MeshObjLoader name="loader" filename="./mesh/organs_lung_right.obj" handleSeams="1"/>
	    <OglModel name="Visual" src="@loader" texturename=""/>
		<SparseGridTopology name="grid" n="4 7 6" position="@loader.position" drawHexahedra="0" />
		<MechanicalObject name="dofs" scale3d="1 1 1" />
		<UniformMass totalMass="1.0" />
		<HexahedronFEMForceField name="FEM" youngModulus="40.0" poissonRatio="0.1" method="large" printLog="0" />
		<MiddleForceField name="center" force="0.02" pace="3.0" />

		<BoxROI name="ROI1" box="-10 4 -5 -4 17 3" drawBoxes="1" />
		<FixedConstraint indices="@ROI1.indices" />

		<Node name="lung_right_visu">
            <MeshObjLoader name="loader" filename="./mesh/organs_lung_right.obj" handleSeams="1"/>
            <OglModel name="Visual" src="@loader" texturename=""/>
			<BarycentricMapping input="@.." output="@Visual" />
		</Node>

		<Node name="lung_right_collision">
			<MeshObjLoader name="loader" filename="./mesh/organs_lung_right_collision.obj"/>
			<MeshTopology src="@loader" />
            <MechanicalObject src="@loader" name="CollisModel" />
            <SphereCollisionModel radius="0.5"  selfCollision="0" group="1"/>
			<BarycentricMapping input="@.." output="@." />
		</Node>
		<UncoupledConstraintCorrection />
	</Node>


	<Node name="heart">
		<MeshObjLoader name="loader" filename="./mesh/organs_heart.obj" />
		<SparseGridTopology name="grid" n="5 5 5" position="@loader.position" drawHexahedra="0" />
		<MechanicalObject name="dofs" scale3d="1 1 1" />
		<UniformMass totalMass="1.0" />
		<HexahedronFEMForceField name="FEM" youngModulus="40.0" poissonRatio="0.1" method="large" printLog="0" />
		<MiddleForceField name="center" force="0.12" pace="0.4" />
		<BoxROI name="ROI1" box="-3 10 -2 3 15 3" drawBoxes="1" />
		<FixedConstraint indices="@ROI1.indices" />

		<Node name="heart_visu">
            <MeshObjLoader name="loader" filename="./mesh/organs_heart.obj" handleSeams="1"/>
            <OglModel name="Visual" src="@loader" texturename="./mesh/Materials/Textures/heart_diffC.jpg"/>
			<BarycentricMapping input="@.." output="@Visual" />
		</Node>
<!--
		<Node name="heart_collision">
			<MeshObjLoader name="loader" filename="./mesh/organs_heart_collision.obj"/>
			<MeshTopology src="@loader" />
            <MechanicalObject src="@loader" name="CollisModel" />
            <SphereCollisionModel radius="0.5"  selfCollision="0" group="1"/>

			<Point  selfCollision="0" group="1"/>
			<Triangle  selfCollision="0" group="1"/>

			<BarycentricMapping input="@.." output="@." />
		</Node>-->
		<UncoupledConstraintCorrection />
	</Node>


	<Node name="diaphragm">
		<MeshObjLoader name="loader" filename="./mesh/organs_diaphragm.obj" />
		<SparseGridTopology name="grid" n="6 6 4" position="@loader.position" drawHexahedra="0" />
		<MechanicalObject name="dofs" scale3d="1 1 1" />
		<UniformMass totalMass="1.0" />
		<HexahedronFEMForceField name="FEM" youngModulus="50.0" poissonRatio="0.1" method="large" printLog="0" />

		<BoxROI name="ROI1" box="-10 -40 -6 10 0 0" drawBoxes="1" />
		<FixedConstraint indices="@ROI1.indices" />

		<Node name="diaphragm_visu">
            <MeshObjLoader name="loader" filename="./mesh/organs_diaphragm.obj" handleSeams="1"/>
            <OglModel name="Visual" src="@loader" texturename=""/>
			<BarycentricMapping input="@.." output="@Visual" />
		</Node>

		<Node name="diaphragm_collision">
			<MeshObjLoader name="loader" filename="./mesh/organs_diaphragm_collision.obj"/>
			<MeshTopology src="@loader" />
            <MechanicalObject src="@loader" name="CollisModel" />
            <SphereCollisionModel radius="0.5"  selfCollision="0" group="2"/>
			<BarycentricMapping input="@.." output="@." />
		</Node>
		<UncoupledConstraintCorrection />
	</Node>


	<Node name="intestine">
		<MeshObjLoader name="loader" filename="./mesh/organs_intestine.obj" />
		<SparseGridTopology name="grid" n="4 4 4" position="@loader.position" drawHexahedra="0" />
		<MechanicalObject name="dofs" scale3d="1 1 1" />
		<UniformMass totalMass="1.0" />
		<HexahedronFEMForceField name="FEM" youngModulus="10.0" poissonRatio="0.1" method="large" printLog="0" />

		<BoxROI name="ROI1" box="-10 -40 -6 10 0 0" drawBoxes="1" />
		<FixedConstraint indices="@ROI1.indices" />

		<Node name="intestine_visu">
            <MeshObjLoader name="loader" filename="./mesh/organs_intestine.obj" handleSeams="1"/>
            <OglModel name="Visual" src="@loader" texturename=""/>
			<BarycentricMapping input="@.." output="@Visual" />
		</Node>

		<Node name="intestine_collision">
			<MeshObjLoader name="loader" filename="./mesh/organs_intestine_collision.obj"/>
			<MeshTopology src="@loader" />
            <MechanicalObject src="@loader" name="CollisModel" />
            <SphereCollisionModel radius="0.5"  selfCollision="0"/>
			<BarycentricMapping input="@.." output="@." />
		</Node>
		<UncoupledConstraintCorrection />
	</Node>

	<Node name="stomach">
		<MeshObjLoader name="loader" filename="./mesh/organs_stomach.obj" />
		<SparseGridTopology name="grid" n="4 4 4" position="@loader.position" drawHexahedra="0" />
		<MechanicalObject name="dofs" scale3d="1 1 1" />
		<UniformMass totalMass="1.0" />
		<HexahedronFEMForceField name="FEM" youngModulus="100.0" poissonRatio="0.1" method="large" printLog="0" />

		<BoxROI name="ROI1" box="-6 0 -6 6 40 6" drawBoxes="1" />
		<FixedConstraint indices="@ROI1.indices" />

		<BoxROI name="ROI2" box="-8 -10 0 0 -8 10" drawBoxes="1" />
		<FixedConstraint indices="@ROI2.indices" />

		<Node name="stomach_visu">
            <MeshObjLoader name="loader" filename="./mesh/organs_stomach.obj" handleSeams="1"/>
            <OglModel name="Visual" src="@loader" texturename=""/>
			<BarycentricMapping input="@.." output="@Visual" />
		</Node>

		<Node name="stomach_collision">
			<MeshObjLoader name="loader" filename="./mesh/organs_stomach_collision.obj"/>
			<MeshTopology src="@loader" />
            <MechanicalObject src="@loader" name="CollisModel" />
            <SphereCollisionModel radius="0.5"  selfCollision="0" group="1"/>
            <!--
			<Point  selfCollision="0" group="1"/>
			<Triangle  selfCollision="0" group="1"/>
			-->
			<BarycentricMapping input="@.." output="@." />
		</Node>
		<UncoupledConstraintCorrection />
	</Node>

	<Node name="pancreas">
		<MeshObjLoader name="loader" filename="./mesh/organs_pancreas.obj" />
		<SparseGridTopology name="grid" n="4 3 3" position="@loader.position" drawHexahedra="0" />
		<MechanicalObject name="dofs" scale3d="1 1 1" />
		<UniformMass totalMass="1.0" />
		<HexahedronFEMForceField name="FEM" youngModulus="50.0" poissonRatio="0.1" method="large" printLog="0" />

		<BoxROI name="ROI2" box="-8 -10 0 5 -5 1" drawBoxes="1" />
		<FixedConstraint indices="@ROI2.indices" />

		<Node name="pancreas_visu">
            <MeshObjLoader name="loader" filename="./mesh/organs_pancreas.obj" handleSeams="1"/>
            <OglModel name="Visual" src="@loader" texturename=""/>
			<BarycentricMapping input="@.." output="@Visual" />
		</Node>

		<Node name="pancreas_collision">
			<MeshObjLoader name="loader" filename="./mesh/organs_pancreas_collision.obj"/>
			<MeshTopology src="@loader" />
            <MechanicalObject src="@loader" name="CollisModel" />
            <SphereCollisionModel radius="0.2"  selfCollision="0"  group="2"/>
            <!--
			<Point  selfCollision="0" />
			<Triangle  selfCollision="0" />
			-->
			<BarycentricMapping input="@.." output="@." />
		</Node>
		<UncoupledConstraintCorrection />
	</Node>


	<Node name="liver">
        <MeshGmshLoader name="loader" filename="./mesh/organs_liver2.msh" />
        <MechanicalObject src="@loader" name="Volume" />

		<TetrahedronSetTopologyContainer  name="Container" position="@Volume.position" src="@loader" tags=" "/>
		<TetrahedronSetTopologyModifier   name="Modifier" />
		<TetrahedronSetTopologyAlgorithms name="TopoAlgo"  template="Vec3d" />
		<TetrahedronSetGeometryAlgorithms name="GeomAlgo"  template="Vec3d" />

		<BoxROI name="ROI2" box="-7 -2 1 -3 0 5" drawBoxes="1" />
		<FixedConstraint indices="@ROI2.indices" />

        <DiagonalMass massDensity="1.0" />
        <FastTetrahedralCorotationalForceField name="FEM" youngModulus="3000" poissonRatio="0.3" method="large" />
		<UncoupledConstraintCorrection defaultCompliance="0.001"/>
        <Node name="surface-old">
            <TriangleSetTopologyContainer  name="Container" fileTopology="" tags=" " />
			<TriangleSetTopologyModifier   name="Modifier" />
			<TriangleSetTopologyAlgorithms name="TopoAlgo"   template="Vec3d" />
			<TriangleSetGeometryAlgorithms name="GeomAlgo"   template="Vec3d" />

            <Tetra2TriangleTopologicalMapping input="@../Container" output="@Container" noNewTriangles="1"/>
            <TriangleCollisionModel name="triangleCol" tags="CarvingSurface"/>
            <Node name="Visu-old">
                <OglModel name="Visual" color="blue" />
                <IdentityMapping input="@../../Volume" output="@Visual" />
            </Node>
        </Node>

		<Node name="surface-new">
            <TriangleSetTopologyContainer  name="Container" fileTopology="" tags=" " />
			<TriangleSetTopologyModifier   name="Modifier" />
			<TriangleSetTopologyAlgorithms name="TopoAlgo"   template="Vec3d" />
			<TriangleSetGeometryAlgorithms name="GeomAlgo"   template="Vec3d" />

            <Tetra2TriangleTopologicalMapping input="@../Container" output="@Container" noInitialTriangles="1"/>
            <TriangleCollisionModel name="triangleCol" tags="CarvingSurface"/>
            <Node name="Visu-new">
                <OglModel name="Visual" color="red" />
                <IdentityMapping input="@../../Volume" output="@Visual" />
            </Node>
        </Node>
    </Node>


	<Node name="kidney_left">
		<MeshObjLoader name="loader" filename="./mesh/organs_kidney_left.obj" />
		<SparseGridTopology name="grid" n="4 4 3" position="@loader.position" drawHexahedra="0" />
		<MechanicalObject name="dofs" scale3d="1 1 1" />
		<UniformMass totalMass="1.0" />
		<HexahedronFEMForceField name="FEM" youngModulus="100.0" poissonRatio="0.1" method="large" printLog="0" />

		<BoxROI name="ROI2" box="2 -14 -2 6 -7 1" drawBoxes="1" />
		<FixedConstraint indices="@ROI2.indices" />

		<Node name="kidney_left_visu">
            <MeshObjLoader name="loader" filename="./mesh/organs_kidney_left.obj" handleSeams="1"/>
            <OglModel name="Visual" src="@loader" texturename=""/>
			<BarycentricMapping input="@.." output="@Visual" />
		</Node>

		<Node name="kidney_left_collision">
			<MeshObjLoader name="loader" filename="./mesh/organs_kidney_left_collision.obj"/>
			<MeshTopology src="@loader" />
            <MechanicalObject src="@loader" name="CollisModel" />
            <SphereCollisionModel radius="0.5"  selfCollision="0" />
			<BarycentricMapping input="@.." output="@." />
		</Node>
		<UncoupledConstraintCorrection />
	</Node>

	<Node name="kidney_right">
		<MeshObjLoader name="loader" filename="./mesh/organs_kidney_right.obj" />
		<SparseGridTopology name="grid" n="4 4 3" position="@loader.position" drawHexahedra="0" />
		<MechanicalObject name="dofs" scale3d="1 1 1" />
		<UniformMass totalMass="1.0" />
		<HexahedronFEMForceField name="FEM" youngModulus="100.0" poissonRatio="0.1" method="large" printLog="0" />

		<BoxROI name="ROI2" box="-6 -14 -2 -2 -7 1" drawBoxes="1" />
		<FixedConstraint indices="@ROI2.indices" />

		<Node name="kidney_right_visu">
            <MeshObjLoader name="loader" filename="./mesh/organs_kidney_right.obj" handleSeams="1"/>
            <OglModel name="Visual" src="@loader" texturename=""/>
			<BarycentricMapping input="@.." output="@Visual" />
		</Node>

		<Node name="kidney_right_collision">
			<MeshObjLoader name="loader" filename="./mesh/organs_kidney_right_collision.obj"/>
			<MeshTopology src="@loader" />
            <MechanicalObject src="@loader" name="CollisModel" />
            <SphereCollisionModel radius="0.5"  selfCollision="0" />
			<BarycentricMapping input="@.." output="@." />
		</Node>
		<UncoupledConstraintCorrection />
	</Node>
<!--
	<Node name="liver_stl">
		<MeshSTLLoader filename="./mesh/organs_liver2.stl" name="loader"/>
		<OglModel src="@loader" color="blue" />
	</Node>
	-->

	<Node name="torso_skeleton">
		<MeshObjLoader filename="./mesh/torso_skeleton.obj" name="loader" flipNormals="false" translation="0 -137 6.5" scale3d="1.1 1.1 1.1"/>
		<OglModel src="@loader" color="0.7 0.7 0.7 0.3" />
	</Node>

	<Node name="carvingElement">
		<MechanicalObject name="Particles" template="Vec3d" position="0 0 30"/>
		<UniformMass name="Mass" totalMass="1.0" />
		<SphereCollisionModel radius="1.0" tags="CarvingTool"/>
		<UncoupledConstraintCorrection />
	</Node>

	<Node name="collisionElement">
		<MechanicalObject name="Particles" template="Vec3d" position="0 0 30"/>
		<UniformMass name="Mass" totalMass="1.0" />
		<SphereCollisionModel radius="1.0"/>
		<UncoupledConstraintCorrection />
	</Node>

</Node>
